# OpenSim document version 30000
ForwardTool tka_passive_flex_60:
  model_file: tka_knee_6DOF_TF.osim
  replace_force_set: false
  results_directory: results
  output_precision: 8
  initial_time: 0
  final_time: 3.5
  solve_for_equilibrium_for_auxiliary_states: false
  maximum_number_of_integrator_steps: 20000
  maximum_integrator_step_size: 0.01
  minimum_integrator_step_size: 1e-8
  integrator_error_tolerance: 0.0001
  use_specified_dt: false
  AnalysisSet Analyses:
    ForceReporter: start_time=0 end_time=3.5 step_interval=1 in_degrees=true include_constraint_forces=false
