# OpenSim document version 30000
Model tka_knee_6DOF_TF :
  length_units: m
  force_units: N
  gravity: 0 0 0
  BodySet:
    Body ground: mass=0 mass_center=(0 0 0) inertia_xx=0 inertia_yy=0 inertia_zz=0
    Body femur_r: mass=9.3424 mass_center=(0 -0.171081 0) inertia_xx=0.1765001 inertia_yy=0.03620146
        inertia_zz=0.1765001 meshes=(Femur.stl Femoral Component.stl)
      CustomJoint gnd_femur_r: parent_body=ground location_in_parent=(0 0 0) location=(0 0 0)
        Coordinate ground_r1: motion_type=rotational default_value=4.006932e-16 range=(-4.712389 4.712389)
            clamped=false locked=true
        Coordinate ground_r2: motion_type=rotational default_value=-1.11824e-16 range=(-4.712389 4.712389)
            clamped=false locked=true
        Coordinate ground_r3: motion_type=rotational default_value=4.135996e-16 range=(-4.712389 4.712389)
            clamped=false locked=true
        Coordinate ground_tx: motion_type=translational default_value=-1.235756e-16 range=(-10 10) clamped=false
            locked=true
        Coordinate ground_ty: motion_type=translational default_value=0.969 range=(-10 10) clamped=false locked=true
        Coordinate ground_tz: motion_type=translational default_value=-6.386464e-17 range=(-10 10) clamped=false
            locked=true
        SpatialTransform:
          TransformAxis rotation1: coordinates=ground_r1 axis=(1 0 1) LinearFunction(coefficients=1 0)
          TransformAxis rotation2: coordinates=ground_r2 axis=(0 1 0) LinearFunction(coefficients=1 0)
          TransformAxis rotation3: coordinates=ground_r3 axis=(0 0 1) LinearFunction(coefficients=1 0)
          TransformAxis translation1: coordinates=ground_tx axis=(1 0 0) LinearFunction(coefficients=1 0)
          TransformAxis translation2: coordinates=ground_ty axis=(0 1 0) LinearFunction(coefficients=1 0)
          TransformAxis translation3: coordinates=ground_tz axis=(0 0 1) LinearFunction(coefficients=1 0)
      WrapEllipsoid lPFL_r: xyz_body_rotation=(-0.2 0.15 -0.6) translation=(0.006 -0.418 0.021)
          dimensions=(0.035 0.038 0.016)
      WrapEllipsoid mPFL_r: xyz_body_rotation=(0.2 -0.3 -0.8) translation=(0.005 -0.419 -0.028)
          dimensions=(0.034 0.037 0.016)
      WrapCylinder Capsule_r: xyz_body_rotation=(-0.0298451 0.0200713 0.331613) translation=(-0.0105 -0.4299 -0.0013)
          radius=0.019 length=0.5275
      WrapCylinder passive_quads_r: xyz_body_rotation=(-0.0298451 0.0200713 0.331613) translation=(0 -0.414 -0.0013)
          radius=0.04 length=0.1
    Body tibia_r: mass=2.99427 mass_center=(0 -0.17343 0) inertia_xx=0.02821573 inertia_yy=0.004850446
        inertia_zz=0.0293745 meshes=(Tibia.stl Fibula.stl Tibial Tray.stl Tibial Insert.stl)
      CustomJoint knee_r: parent_body=femur_r location_in_parent=(-0.00633 -0.426668 -0.001335) location=(0 0 0)
        Coordinate knee_flex_r: motion_type=rotational default_value=-0.0005967135 range=(-0.1745 1.571) clamped=true
            prescribed=true
          prescribed_function: SimmSpline: x=(0 0.05 0.1 0.15 0.2 0.25 0.3 0.35 0.4 0.45 0.5 0.75 1 1.25 1.5 1.75 2 2.25 2.5 2.75 3 3.25 3.5)
              y=(0 0 0 0 0 0 0 0 0 0 0 0.2618 0.3927 0.5236 0.7854 0.9163 1.0472 0.9163 0.7854 0.5236 0.3927 0.2618 0)
        Coordinate knee_add_r: motion_type=rotational default_value=-0.03604866 range=(-0.8726646 0.8726646)
            clamped=true
        Coordinate knee_rot_r: motion_type=rotational default_value=-0.01598933 range=(-0.8726646 0.8726646)
            clamped=true
        Coordinate knee_tx_r: motion_type=translational default_value=-0.003459113 range=(-0.211 0.211) clamped=true
        Coordinate knee_ty_r: motion_type=translational default_value=0.007956342 range=(-0.5275 1.266) clamped=true
        Coordinate knee_tz_r: motion_type=translational default_value=-0.008901847 range=(-0.211 0.211) clamped=true
        SpatialTransform:
          TransformAxis rotation1: coordinates=knee_flex_r axis=(0 0 1)
            SimmSpline: x=(-6.28319 6.28319) y=(6.28319 -6.28319)
          TransformAxis rotation2: coordinates=knee_add_r axis=(1 0 0) LinearFunction(coefficients=1 0)
          TransformAxis rotation3: coordinates=knee_rot_r axis=(0 1 0) LinearFunction(coefficients=1 0)
          TransformAxis translation1: coordinates=knee_tx_r axis=(1 0 0) LinearFunction(coefficients=1 0)
          TransformAxis translation2: coordinates=knee_ty_r axis=(0 1 0) LinearFunction(coefficients=1 0)
          TransformAxis translation3: coordinates=knee_tz_r axis=(0 0 1) LinearFunction(coefficients=1 0)
      WrapEllipsoid Med_Lig_r: xyz_body_rotation=(-0.104894 -0.0349066 0.181689) translation=(0.0077 -0.0432 -0.0256)
          dimensions=(0.032 0.02 0.019)
      WrapEllipsoid Med_LigP_r: xyz_body_rotation=(2.80597 -0.600219 0.686263) translation=(-0.0109 -0.035 -0.024)
          dimensions=(0.0264 0.016 0.01)
    Body patella_r: mass=2 mass_center=(0.003 0 -0.001) inertia_xx=0.001 inertia_yy=0.001 inertia_zz=0.001
        meshes=(Patella.stl Patellar Button.stl)
      CustomJoint pf_r: parent_body=femur_r location_in_parent=(-0.00633 -0.426668 -0.001335) location=(0 0 0)
        Coordinate knee_angle_r_beta: motion_type=rotational default_value=-0.0005967135 range=(-1.570796 1.570796)
            clamped=true
        SpatialTransform:
          TransformAxis rotation1: coordinates=knee_angle_r_beta axis=(0 0 1)
            SimmSpline pf_flex_r: x=(0 0.17453 0.34907 0.5236 0.69813 0.87267 1.0472 1.22173 1.39627 1.5708)
                y=(-0.15009 -0.22303 -0.31566 -0.40736 -0.49577 -0.65085 -0.83592 -1.02406 -1.13012 -1.32149)
          TransformAxis rotation2: coordinates=knee_angle_r_beta axis=(1 0 0)
            SimmSpline pf_rot_r: x=(0 0.17453 0.34907 0.5236 0.69813 0.87267 1.0472 1.22173 1.39627 1.5708)
                y=(-0.0175 -0.03219 -0.02501 -0.00386 0.0305 0.03463 0.01893 0.04724 0.04846 0.05747)
          TransformAxis rotation3: coordinates=knee_angle_r_beta axis=(0 1 0)
            SimmSpline pf_tilt_r: x=(0 0.17453 0.34907 0.5236 0.69813 0.87267 1.0472 1.22173 1.39627 1.5708)
                y=(0.04221 0.03458 0.03723 0.0431 0.03698 0.06588 0.08259 0.09156 0.11054 0.12563)
          TransformAxis translation1: coordinates=knee_angle_r_beta axis=(1 0 0)
            SimmSpline pf_tx_r: x=(0 0.17453 0.34907 0.5236 0.69813 0.87267 1.0472 1.22173 1.39627 1.5708)
                y=(0.05275 0.05185 0.04972 0.04536 0.041 0.03597 0.0312 0.02681 0.02075 0.01609)
          TransformAxis translation2: coordinates=knee_angle_r_beta axis=(0 1 0)
            SimmSpline pf_ty_r: x=(0 0.17453 0.34907 0.5236 0.69813 0.87267 1.0472 1.22173 1.39627 1.5708)
                y=(0.01335 0.00376 -0.00529 -0.01297 -0.0186 -0.0229 -0.02556 -0.02734 -0.02942 -0.03002)
          TransformAxis translation3: coordinates=knee_angle_r_beta axis=(0 0 1)
            SimmSpline pf_tz_r: x=(0 0.17453 0.34907 0.5236 0.69813 0.87267 1.0472 1.22173 1.39627 1.5708)
                y=(0.00136 0.00113 0.00059 0.00021 -0.00016 -0.00013 -0.00062 -0.0012 -0.00135 -0.00167)
      WrapEllipsoid PatTen_r: xyz_body_rotation=(0 0 0.00994838) translation=(0.0005 0.0084 0.0005)
          dimensions=(0.0053 0.0084 0.0127)
  ConstraintSet:
    CoordinateCouplerConstraint patellofemoral_knee_angle_r_con: independent_coordinate_names=knee_flex_r
        dependent_coordinate_name=knee_angle_r_beta scale_factor=1
        coupled_coordinates_function=LinearFunction(coefficients=1 0)
  ForceSet:
    ElasticFoundationForce TF_contact_r: transition_velocity=0.05
      ContactParametersSet contact_parameters:
        ContactParameters: geometry=(femur_TF_mesh_r tibia_mesh_r) stiffness=10000000000 dissipation=0.1
            static_friction=0 dynamic_friction=0 viscous_friction=0
    BushingForce TF_passive: body_1=femur_r body_2=tibia_r location_body_1=(-0.00633 -0.426668 -0.001335)
        orientation_body_1=(0 0 0) location_body_2=(0 0 0) orientation_body_2=(0 0 0)
        rotational_stiffness=(0 0 0) [Nm/rad] translational_stiffness=(0 0 0) [N/m]
        rotational_damping=(1 1 1e-5) [Nm/(rad/s)] translational_damping=(20 20 20) [N/(m/s)]
    UWLigament [values shared by the 149 below unless stated]: ligament_transition_strain=0.03
        normalized_damping_coefficient=0
    UWLigament pCAP1: linear_stiffness=500 reference_strain=0.03 reference_length=0.07138192
      PathPoint -P1: femur_r (-0.01307 -0.399848 -0.028055)
      PathPoint -P2: tibia_r (-0.02134 -0.04693 -0.01936)
      PathWrap: wrap_object=Capsule_r
    UWLigament pCAP2: linear_stiffness=500 reference_strain=0.03 reference_length=0.07269563
      PathPoint P1: femur_r (-0.01328 -0.400198 0.025505)
      PathPoint P2: tibia_r (-0.01746 -0.04973 0.02383)
      PathWrap: wrap_object=Capsule_r
    UWLigament pCAP3: linear_stiffness=500 reference_strain=0.03 reference_length=0.08329457
      PathPoint P1: femur_r (-0.01307 -0.399848 -0.026945)
      PathPoint P2: tibia_r (-0.01745 -0.04974 0.02272)
      PathWrap: wrap_object=Capsule_r
    UWLigament pCAP4: linear_stiffness=500 reference_strain=0.03 reference_length=0.08754782
      PathPoint P1: femur_r (-0.01328 -0.400198 0.024395)
      PathPoint P2: tibia_r (-0.02135 -0.04692 -0.01825)
      PathWrap: wrap_object=Capsule_r
    UWLigament pCAP5: linear_stiffness=500 reference_strain=0.03 reference_length=0.07120809
      PathPoint P1: femur_r (-0.01307 -0.399848 -0.023605)
      PathPoint P2: tibia_r (-0.02138 -0.04691 -0.01491)
      PathWrap: wrap_object=Capsule_r
    UWLigament pCAP6: linear_stiffness=500 reference_strain=0.03 reference_length=0.07287832
      PathPoint P1: femur_r (-0.01328 -0.400198 0.021055)
      PathPoint P2: tibia_r (-0.01743 -0.04975 0.01938)
      PathWrap: wrap_object=Capsule_r
    UWLigament pCAP7: linear_stiffness=500 reference_strain=0.03 reference_length=0.07103366
      PathPoint P1: femur_r (-0.01307 -0.399848 -0.019155)
      PathPoint P2: tibia_r (-0.02141 -0.04689 -0.01046)
      PathWrap: wrap_object=Capsule_r
    UWLigament pCAP8: linear_stiffness=500 reference_strain=0.03 reference_length=0.07305986
      PathPoint P1: femur_r (-0.01328 -0.400198 0.016595)
      PathPoint P2: tibia_r (-0.01739 -0.04977 0.01493)
      PathWrap: wrap_object=Capsule_r
    UWLigament ITB_r: linear_stiffness=1000 reference_strain=0.01 reference_length=0.4751215
      PathPoint P1: femur_r (-0.01113 -0.00523 0.06678)
      PathPoint P2: tibia_r (0.0230491 -0.0423875 0.0458696)
      PathPoint P3: tibia_r (0.02771 -0.05844 0.0335)
    UWLigament MCLd1: linear_stiffness=150 reference_strain=0.02 reference_length=0.05507254
      PathPoint P1: femur_r (0.00658 -0.41535 -0.04778)
      PathPoint P2: tibia_r (0.00529 -0.0488 -0.04004)
    UWLigament MCLd2: linear_stiffness=150 reference_strain=0.02 reference_length=0.05531455
      PathPoint P1: femur_r (0.00718 -0.41401 -0.0481)
      PathPoint P2: tibia_r (0.00819 -0.04823 -0.04039)
    UWLigament MCLd3: linear_stiffness=150 reference_strain=0.02 reference_length=0.05352731
      PathPoint P1: femur_r (0.00687 -0.41793 -0.04809)
      PathPoint P2: tibia_r (0.00177 -0.04864 -0.03988)
    UWLigament MCLd4: linear_stiffness=150 reference_strain=0.02 reference_length=0.05831826
      PathPoint P1: femur_r (0.0025 -0.41212 -0.04846)
      PathPoint P2: tibia_r (0.00604 -0.04987 -0.04004)
    UWLigament MCLd5: linear_stiffness=150 reference_strain=0.02 reference_length=0.05478052
      PathPoint P1: femur_r (0.00983 -0.41474 -0.04735)
      PathPoint P2: tibia_r (0.00703 -0.04744 -0.04044)
    UWLigament MCLd6: linear_stiffness=150 reference_strain=0.02 reference_length=0.05551569
      PathPoint P1: femur_r (0.00415 -0.41731 -0.04805)
      PathPoint P2: tibia_r (1e-5 -0.05045 -0.03926)
    UWLigament MCLd7: linear_stiffness=150 reference_strain=0.02 reference_length=0.05752858
      PathPoint P1: femur_r (0.00617 -0.41129 -0.04787)
      PathPoint P2: tibia_r (0.01219 -0.04858 -0.03963)
    UWLigament MCLd8: linear_stiffness=150 reference_strain=0 reference_length=0.05173111
      PathPoint P1: femur_r (0.01021 -0.41929 -0.04709)
      PathPoint P2: tibia_r (0.00268 -0.04713 -0.03991)
    UWLigament MCLd9: linear_stiffness=150 reference_strain=0.02 reference_length=0.05656456
      PathPoint P1: femur_r (0.00152 -0.41463 -0.04833)
      PathPoint P2: tibia_r (0.00391 -0.05042 -0.03982)
    UWLigament MCLd10: linear_stiffness=150 reference_strain=0.02 reference_length=0.05273276
      PathPoint P1: femur_r (0.00644 -0.4148 -0.04833)
      PathPoint P2: tibia_r (0.01036 -0.04693 -0.04052)
    UWLigament MCLs1: linear_stiffness=90 reference_strain=0.04 reference_length=0.1109264
      PathPoint P1: femur_r (0.00844 -0.40937 -0.04608)
      PathPoint P2: tibia_r (0.00868 -0.09586 -0.02514)
      PathWrap: wrap_object=Med_Lig_r method=hybrid
    UWLigament MCLs2: linear_stiffness=90 reference_strain=0.04 reference_length=0.1105172
      PathPoint P1: femur_r (0.00761 -0.40959 -0.047)
      PathPoint P2: tibia_r (0.00682 -0.09572 -0.02574)
      PathWrap: wrap_object=Med_Lig_r method=hybrid
    UWLigament MCLs3: linear_stiffness=90 reference_strain=0.04 reference_length=0.1086188
      PathPoint P1: femur_r (0.00904 -0.40835 -0.04578)
      PathPoint P2: tibia_r (0.01119 -0.09259 -0.02499)
      PathWrap: wrap_object=Med_Lig_r method=hybrid
    UWLigament MCLs4: linear_stiffness=90 reference_strain=0.04 reference_length=0.1153504
      PathPoint P1: femur_r (0.00912 -0.41163 -0.04706)
      PathPoint P2: tibia_r (0.00766 -0.10294 -0.02525)
      PathWrap: wrap_object=Med_Lig_r method=hybrid
    UWLigament MCLs5: linear_stiffness=90 reference_strain=0.04 reference_length=0.1068967
      PathPoint P1: femur_r (0.00585 -0.40711 -0.0462)
      PathPoint P2: tibia_r (0.0073 -0.08937 -0.02613)
      PathWrap: wrap_object=Med_Lig_r method=hybrid
    UWLigament MCLs6: linear_stiffness=90 reference_strain=0.04 reference_length=0.1128468
      PathPoint P1: femur_r (0.01123 -0.40969 -0.04523)
      PathPoint P2: tibia_r (0.01167 -0.09822 -0.02406)
      PathWrap: wrap_object=Med_Lig_r method=hybrid
    UWLigament MCLs7: linear_stiffness=90 reference_strain=0.04 reference_length=0.1127482
      PathPoint P1: femur_r (0.00749 -0.4109 -0.04744)
      PathPoint P2: tibia_r (0.00551 -0.09923 -0.0254)
      PathWrap: wrap_object=Med_Lig_r method=hybrid
    UWLigament MCLs8: linear_stiffness=90 reference_strain=0.04 reference_length=0.1055254
      PathPoint P1: femur_r (0.00814 -0.40716 -0.04538)
      PathPoint P2: tibia_r (0.01068 -0.08787 -0.02521)
      PathWrap: wrap_object=Med_Lig_r method=hybrid
    UWLigament MCLs9: linear_stiffness=90 reference_strain=-0.01 reference_length=0.1172253
      PathPoint P1: femur_r (0.01107 -0.4129 -0.04643)
      PathPoint P2: tibia_r (0.0098 -0.10622 -0.02445)
      PathWrap: wrap_object=Med_Lig_r method=hybrid
    UWLigament MCLs10: linear_stiffness=90 reference_strain=0.04 reference_length=0.1069549
      PathPoint P1: femur_r (0.00505 -0.40867 -0.04724)
      PathPoint P2: tibia_r (0.00423 -0.09086 -0.0262)
      PathWrap: wrap_object=Med_Lig_r method=hybrid
    UWLigament MCLs11: linear_stiffness=90 reference_strain=0.04 reference_length=0.1097813
      PathPoint P1: femur_r (0.01029 -0.40798 -0.04482)
      PathPoint P2: tibia_r (0.01355 -0.09309 -0.02329)
      PathWrap: wrap_object=Med_Lig_r method=hybrid
    UWLigament MCLs12: linear_stiffness=90 reference_strain=0.04 reference_length=0.1170914
      PathPoint P1: femur_r (0.00839 -0.4128 -0.04757)
      PathPoint P2: tibia_r (0.00521 -0.10541 -0.02432)
      PathWrap: wrap_object=Med_Lig_r method=hybrid
    UWLigament MCLs13: linear_stiffness=90 reference_strain=0.04 reference_length=0.1042247
      PathPoint P1: femur_r (0.00592 -0.40572 -0.04527)
      PathPoint P2: tibia_r (0.00852 -0.08504 -0.02633)
      PathWrap: wrap_object=Med_Lig_r method=hybrid
    UWLigament MCLs14: linear_stiffness=90 reference_strain=-0.06 reference_length=0.1155151
      PathPoint P1: femur_r (0.01309 -0.41191 -0.04485)
      PathPoint P2: tibia_r (0.01251 -0.10333 -0.02348)
      PathWrap: wrap_object=Med_Lig_r method=hybrid
    UWLigament MCLs15: linear_stiffness=90 reference_strain=0.04 reference_length=0.1114446
      PathPoint P1: femur_r (0.0063 -0.41062 -0.04767)
      PathPoint P2: tibia_r (0.00337 -0.09707 -0.02481)
      PathWrap: wrap_object=Med_Lig_r method=hybrid
    UWLigament MCLs16: linear_stiffness=90 reference_strain=0.04 reference_length=0.1042107
      PathPoint P1: femur_r (0.00895 -0.40669 -0.04466)
      PathPoint P2: tibia_r (0.01341 -0.0857 -0.0239)
      PathWrap: wrap_object=Med_Lig_r method=hybrid
    UWLigament MCLs17: linear_stiffness=90 reference_strain=-0.01 reference_length=0.1202545
      PathPoint P1: femur_r (0.01047 -0.41437 -0.04704)
      PathPoint P2: tibia_r (0.00776 -0.11061 -0.02414)
      PathWrap: wrap_object=Med_Lig_r method=hybrid
    UWLigament MCLs18: linear_stiffness=90 reference_strain=0.04 reference_length=0.103225
      PathPoint P1: femur_r (0.00269 -0.40618 -0.04622)
      PathPoint P2: tibia_r (0.00443 -0.0845 -0.02699)
      PathWrap: wrap_object=Med_Lig_r method=hybrid
    UWLigament MCLs19: linear_stiffness=90 reference_strain=-0.01 reference_length=0.1128335
      PathPoint P1: femur_r (0.01225 -0.40884 -0.044)
      PathPoint P2: tibia_r (0.01436 -0.09704 -0.02228)
      PathWrap: wrap_object=Med_Lig_r method=hybrid
    UWLigament MCLs20: linear_stiffness=90 reference_strain=0.04 reference_length=0.1159116
      PathPoint P1: femur_r (0.00714 -0.41279 -0.04795)
      PathPoint P2: tibia_r (0.00323 -0.10367 -0.02354)
      PathWrap: wrap_object=Med_Lig_r method=hybrid
    UWLigament PCLal1: linear_stiffness=570 reference_strain=0.03 reference_length=0.04408752
      PathPoint P1: femur_r (-0.003 -0.42684 -0.0132)
      PathPoint P2: tibia_r (-0.01146 -0.04636 0.00366)
    UWLigament PCLal2: linear_stiffness=570 reference_strain=0.03 reference_length=0.0438832
      PathPoint P1: femur_r (-0.00357 -0.42675 -0.01498)
      PathPoint P2: tibia_r (-0.01147 -0.04628 0.00188)
    UWLigament PCLal3: linear_stiffness=570 reference_strain=0.03 reference_length=0.04602073
      PathPoint P1: femur_r (-0.0021 -0.42557 -0.01196)
      PathPoint P2: tibia_r (-0.01227 -0.04636 0.00526)
    UWLigament PCLal4: linear_stiffness=570 reference_strain=-0.02 reference_length=0.04129904
      PathPoint P1: femur_r (-0.00289 -0.42958 -0.01379)
      PathPoint P2: tibia_r (-0.01015 -0.04646 0.00328)
    UWLigament PCLal5: linear_stiffness=570 reference_strain=0.03 reference_length=0.04624766
      PathPoint P1: femur_r (-0.00429 -0.42419 -0.0146)
      PathPoint P2: tibia_r (-0.01286 -0.04615 0.00191)
    UWLigament PCLal6: linear_stiffness=570 reference_strain=-0.02 reference_length=0.04435142
      PathPoint P1: femur_r (-0.00091 -0.42773 -0.01051)
      PathPoint P2: tibia_r (-0.01115 -0.04655 0.00672)
    UWLigament PCLal7: linear_stiffness=570 reference_strain=0.03 reference_length=0.04166733
      PathPoint P1: femur_r (-0.00434 -0.42837 -0.01544)
      PathPoint P2: tibia_r (-0.01054 -0.04631 0.00096)
    UWLigament PCLal8: linear_stiffness=570 reference_strain=0.03 reference_length=0.04768507
      PathPoint P1: femur_r (-0.00303 -0.42343 -0.01186)
      PathPoint P2: tibia_r (-0.01328 -0.04623 0.00467)
    UWLigament PCLal9: linear_stiffness=570 reference_strain=-0.07 reference_length=0.03989096
      PathPoint P1: femur_r (-0.0019 -0.43143 -0.0116)
      PathPoint P2: tibia_r (-0.00945 -0.04661 0.00521)
    UWLigament PCLal10: linear_stiffness=570 reference_strain=0.03 reference_length=0.04440166
      PathPoint P1: femur_r (-0.00569 -0.42523 -0.01621)
      PathPoint P2: tibia_r (-0.0123 -0.04611 -0.00026)
    UWLigament PCLpm1: linear_stiffness=240 reference_strain=0 reference_length=0.0442799
      PathPoint P1: femur_r (-0.00954 -0.42633 -0.01693)
      PathPoint P2: tibia_r (-0.01543 -0.04635 0.00392)
    UWLigament PCLpm2: linear_stiffness=240 reference_strain=0 reference_length=0.04291289
      PathPoint P1: femur_r (-0.01197 -0.42622 -0.01739)
      PathPoint P2: tibia_r (-0.01578 -0.04601 0.00191)
    UWLigament PCLpm3: linear_stiffness=240 reference_strain=0 reference_length=0.0455252
      PathPoint P1: femur_r (-0.00739 -0.42619 -0.01712)
      PathPoint P2: tibia_r (-0.01463 -0.04626 0.0061)
    UWLigament PCLpm4: linear_stiffness=240 reference_strain=0 reference_length=0.04291916
      PathPoint P1: femur_r (-0.01022 -0.4284 -0.017)
      PathPoint P2: tibia_r (-0.01645 -0.04672 0.00369)
    UWLigament PCLpm5: linear_stiffness=240 reference_strain=0 reference_length=0.04432703
      PathPoint P1: femur_r (-0.01109 -0.4245 -0.01772)
      PathPoint P2: tibia_r (-0.01443 -0.046 0.00176)
    UWLigament PCLpm6: linear_stiffness=240 reference_strain=0 reference_length=0.04538284
      PathPoint P1: femur_r (-0.00589 -0.42796 -0.01637)
      PathPoint P2: tibia_r (-0.01559 -0.04641 0.00717)
    UWLigament PCLpm7: linear_stiffness=240 reference_strain=0 reference_length=0.04140616
      PathPoint P1: femur_r (-0.01329 -0.42729 -0.01701)
      PathPoint P2: tibia_r (-0.01693 -0.04591 0.00034)
    UWLigament PCLpm8: linear_stiffness=240 reference_strain=0 reference_length=0.04639592
      PathPoint P1: femur_r (-0.00742 -0.42427 -0.01696)
      PathPoint P2: tibia_r (-0.01327 -0.04627 0.00549)
    UWLigament PCLpm9: linear_stiffness=240 reference_strain=0 reference_length=0.04349571
      PathPoint P1: femur_r (-0.00811 -0.42989 -0.01626)
      PathPoint P2: tibia_r (-0.01625 -0.04769 0.00508)
    UWLigament PCLpm10: linear_stiffness=240 reference_strain=0 reference_length=0.04307892
      PathPoint P1: femur_r (-0.01434 -0.42433 -0.01744)
      PathPoint P2: tibia_r (-0.01527 -0.04583 -0.00033)
    UWLigament LCL1: linear_stiffness=180 reference_strain=0.06 reference_length=0.06190811
      PathPoint P1: femur_r (-0.01039 -0.41499 0.03747)
      PathPoint P2: tibia_r (-0.00561 -0.05927 0.04748)
    UWLigament LCL2: linear_stiffness=180 reference_strain=0.06 reference_length=0.06119827
      PathPoint P1: femur_r (-0.01134 -0.41513 0.03708)
      PathPoint P2: tibia_r (-0.00465 -0.05889 0.04717)
    UWLigament LCL3: linear_stiffness=180 reference_strain=0.06 reference_length=0.06289965
      PathPoint P1: femur_r (-0.00923 -0.41363 0.03814)
      PathPoint P2: tibia_r (-0.00789 -0.05841 0.04754)
    UWLigament LCL4: linear_stiffness=180 reference_strain=0.06 reference_length=0.06011621
      PathPoint P1: femur_r (-0.01118 -0.41854 0.03769)
      PathPoint P2: tibia_r (-0.00429 -0.06125 0.04813)
    UWLigament LCL5: linear_stiffness=180 reference_strain=0.06 reference_length=0.06292354
      PathPoint P1: femur_r (-0.01062 -0.41259 0.03676)
      PathPoint P2: tibia_r (-0.00543 -0.05792 0.04684)
    UWLigament LCL6: linear_stiffness=180 reference_strain=0.06 reference_length=0.06161165
      PathPoint P1: femur_r (-0.00932 -0.41652 0.03876)
      PathPoint P2: tibia_r (-0.00675 -0.06022 0.0481)
    UWLigament LCL7: linear_stiffness=180 reference_strain=0.06 reference_length=0.05985823
      PathPoint P1: femur_r (-0.01243 -0.41729 0.03695)
      PathPoint P2: tibia_r (-0.00269 -0.05991 0.04719)
    UWLigament LCL8: linear_stiffness=180 reference_strain=0.06 reference_length=0.063483
      PathPoint P1: femur_r (-0.00897 -0.41098 0.03747)
      PathPoint P2: tibia_r (-0.00827 -0.05621 0.04661)
    UWLigament LCL9: linear_stiffness=180 reference_strain=0.06 reference_length=0.05932557
      PathPoint P1: femur_r (-0.0103 -0.41998 0.03818)
      PathPoint P2: tibia_r (-0.00535 -0.0617 0.04845)
    UWLigament LCL10: linear_stiffness=180 reference_strain=0.06 reference_length=0.06208212
      PathPoint P1: femur_r (-0.01175 -0.41333 0.03631)
      PathPoint P2: tibia_r (-0.00442 -0.05801 0.04662)
    UWLigament PT1: linear_stiffness=490 reference_strain=0.01 reference_length=0.08180037
      PathPoint P1: patella_r (0.01033 -0.01708 -0.00539)
      PathPoint P2: tibia_r (0.04095 -0.0919 0.00796)
      PathWrap: wrap_object=PatTen_r method=hybrid
    UWLigament PT2: linear_stiffness=490 reference_strain=0.01 reference_length=0.0816908
      PathPoint P1: patella_r (0.01095 -0.01711 -0.0087)
      PathPoint P2: tibia_r (0.04187 -0.09177 0.00641)
      PathWrap: wrap_object=PatTen_r method=hybrid
    UWLigament PT3: linear_stiffness=490 reference_strain=0.01 reference_length=0.08227727
      PathPoint P1: patella_r (0.01108 -0.01557 -0.00021)
      PathPoint P2: tibia_r (0.04004 -0.09067 0.00969)
      PathWrap: wrap_object=PatTen_r method=hybrid
    UWLigament PT4: linear_stiffness=490 reference_strain=0.01 reference_length=0.08139608
      PathPoint P1: patella_r (0.01042 -0.01966 -0.00643)
      PathPoint P2: tibia_r (0.04145 -0.09421 0.0076)
      PathWrap: wrap_object=PatTen_r method=hybrid
    UWLigament PT5: linear_stiffness=490 reference_strain=0.01 reference_length=0.08168515
      PathPoint P1: patella_r (0.01139 -0.01484 -0.00944)
      PathPoint P2: tibia_r (0.04123 -0.08907 0.00586)
      PathWrap: wrap_object=PatTen_r method=hybrid
    UWLigament PT6: linear_stiffness=490 reference_strain=0.01 reference_length=0.08234555
      PathPoint P1: patella_r (0.0106 -0.01762 0.00014)
      PathPoint P2: tibia_r (0.03982 -0.09288 0.01111)
      PathWrap: wrap_object=PatTen_r method=hybrid
    UWLigament PT7: linear_stiffness=490 reference_strain=0.01 reference_length=0.08219604
      PathPoint P1: patella_r (0.00987 -0.01811 -0.01045)
      PathPoint P2: tibia_r (0.04193 -0.09348 0.0048)
      PathWrap: wrap_object=PatTen_r method=hybrid
    UWLigament PT8: linear_stiffness=490 reference_strain=0.01 reference_length=0.08118022
      PathPoint P1: patella_r (0.01173 -0.01578 -0.00425)
      PathPoint P2: tibia_r (0.04007 -0.08934 0.00879)
      PathWrap: wrap_object=PatTen_r method=hybrid
    UWLigament PT9: linear_stiffness=490 reference_strain=0.01 reference_length=0.0817195
      PathPoint P1: patella_r (0.00996 -0.02056 -0.00182)
      PathPoint P2: tibia_r (0.04059 -0.09558 0.00943)
      PathWrap: wrap_object=PatTen_r method=hybrid
    UWLigament PT10: linear_stiffness=490 reference_strain=0.01 reference_length=0.08257402
      PathPoint P1: patella_r (0.00912 -0.01498 -0.01507)
      PathPoint P2: tibia_r (0.04198 -0.09023 0.00402)
      PathWrap: wrap_object=PatTen_r method=hybrid
    UWLigament PT11: linear_stiffness=490 reference_strain=0.01 reference_length=0.08259829
      PathPoint P1: patella_r (0.00959 -0.01556 0.00469)
      PathPoint P2: tibia_r (0.03832 -0.09086 0.012)
      PathWrap: wrap_object=PatTen_r method=hybrid
    UWLigament PT12: linear_stiffness=490 reference_strain=0.01 reference_length=0.08265937
      PathPoint P1: patella_r (0.00924 -0.01978 -0.00956)
      PathPoint P2: tibia_r (0.04129 -0.09564 0.00548)
      PathWrap: wrap_object=PatTen_r method=hybrid
    UWLigament PT13: linear_stiffness=490 reference_strain=0.01 reference_length=0.07983715
      PathPoint P1: patella_r (0.01223 -0.01588 -0.00521)
      PathPoint P2: tibia_r (0.04048 -0.08806 0.00697)
      PathWrap: wrap_object=PatTen_r method=hybrid
    UWLigament PT14: linear_stiffness=490 reference_strain=0.01 reference_length=0.08328262
      PathPoint P1: patella_r (0.00932 -0.01894 0.00151)
      PathPoint P2: tibia_r (0.03902 -0.09527 0.01233)
      PathWrap: wrap_object=PatTen_r method=hybrid
    UWLigament PT15: linear_stiffness=490 reference_strain=0.01 reference_length=0.08221517
      PathPoint P1: patella_r (0.00839 -0.01721 -0.01426)
      PathPoint P2: tibia_r (0.04208 -0.09254 0.00298)
      PathWrap: wrap_object=PatTen_r method=hybrid
    UWLigament PT16: linear_stiffness=490 reference_strain=0.01 reference_length=0.08260815
      PathPoint P1: patella_r (0.01109 -0.01364 0.0018)
      PathPoint P2: tibia_r (0.03857 -0.08854 0.01071)
      PathWrap: wrap_object=PatTen_r method=hybrid
    UWLigament PT17: linear_stiffness=490 reference_strain=0.01 reference_length=0.08051016
      PathPoint P1: patella_r (0.00866 -0.02289 -0.00476)
      PathPoint P2: tibia_r (0.0407 -0.09682 0.00794)
      PathWrap: wrap_object=PatTen_r method=hybrid
    UWLigament PT18: linear_stiffness=490 reference_strain=0.01 reference_length=0.08352445
      PathPoint P1: patella_r (0.00889 -0.01163 -0.0179)
      PathPoint P2: tibia_r (0.04073 -0.08719 0.0023)
      PathWrap: wrap_object=PatTen_r method=hybrid
    UWLigament PT19: linear_stiffness=490 reference_strain=0.01 reference_length=0.08282337
      PathPoint P1: patella_r (0.00821 -0.0169 0.00505)
      PathPoint P2: tibia_r (0.03746 -0.0925 0.0132)
      PathWrap: wrap_object=PatTen_r method=hybrid
    UWLigament PT20: linear_stiffness=490 reference_strain=0.01 reference_length=0.08313816
      PathPoint P1: patella_r (0.00774 -0.01926 -0.01256)
      PathPoint P2: tibia_r (0.04133 -0.09572 0.00288)
      PathWrap: wrap_object=PatTen_r method=hybrid
    UWLigament PT21: linear_stiffness=490 reference_strain=0.01 reference_length=0.08111631
      PathPoint P1: patella_r (0.01231 -0.01445 -0.00461)
      PathPoint P2: tibia_r (0.03969 -0.0876 0.00828)
      PathWrap: wrap_object=PatTen_r method=hybrid
    UWLigament PT22: linear_stiffness=490 reference_strain=0.01 reference_length=0.08339434
      PathPoint P1: patella_r (0.00769 -0.02073 0.0018)
      PathPoint P2: tibia_r (0.03916 -0.09761 0.01161)
      PathWrap: wrap_object=PatTen_r method=hybrid
    UWLigament PT23: linear_stiffness=490 reference_strain=0.01 reference_length=0.08236062
      PathPoint P1: patella_r (0.00699 -0.01547 -0.01711)
      PathPoint P2: tibia_r (0.04211 -0.09078 0.00213)
      PathWrap: wrap_object=PatTen_r method=hybrid
    UWLigament PT24: linear_stiffness=490 reference_strain=0.01 reference_length=0.08416449
      PathPoint P1: patella_r (0.00763 -0.01256 0.01135)
      PathPoint P2: tibia_r (0.03654 -0.08909 0.01293)
      PathWrap: wrap_object=PatTen_r method=hybrid
    UWLigament PT25: linear_stiffness=490 reference_strain=0.01 reference_length=0.08229779
      PathPoint P1: patella_r (0.0068 -0.02187 -0.00943)
      PathPoint P2: tibia_r (0.04079 -0.09763 0.00566)
      PathWrap: wrap_object=PatTen_r method=hybrid
    UWLigament PT26: linear_stiffness=490 reference_strain=0.01 reference_length=0.08052976
      PathPoint P1: patella_r (0.01172 -0.01321 -0.01034)
      PathPoint P2: tibia_r (0.04024 -0.08574 0.00424)
      PathWrap: wrap_object=PatTen_r method=hybrid
    UWLigament PT27: linear_stiffness=490 reference_strain=0.01 reference_length=0.08386609
      PathPoint P1: patella_r (0.00618 -0.01817 0.00561)
      PathPoint P2: tibia_r (0.03675 -0.09509 0.01384)
      PathWrap: wrap_object=PatTen_r method=hybrid
    UWLigament PT28: linear_stiffness=490 reference_strain=0.01 reference_length=0.08314009
      PathPoint P1: patella_r (0.00527 -0.01781 -0.01642)
      PathPoint P2: tibia_r (0.04145 -0.09429 0.00079)
      PathWrap: wrap_object=PatTen_r method=hybrid
    UWLigament PT29: linear_stiffness=490 reference_strain=0.01 reference_length=0.08117219
      PathPoint P1: patella_r (0.01127 -0.01383 -0.00123)
      PathPoint P2: tibia_r (0.03866 -0.08704 0.01029)
      PathWrap: wrap_object=PatTen_r method=hybrid
    UWLigament PT30: linear_stiffness=490 reference_strain=0.01 reference_length=0.08097557
      PathPoint P1: patella_r (0.00576 -0.02374 -0.00052)
      PathPoint P2: tibia_r (0.03978 -0.09859 0.00926)
      PathWrap: wrap_object=PatTen_r method=hybrid
    UWLigament lPFL1: isDisabled=true linear_stiffness=35 reference_strain=0.01 reference_length=0.05087771
      PathPoint P1: femur_r (0.00279 -0.41542 0.0386)
      PathPoint P2: patella_r (0.00266 0.00287 0.0211)
      PathWrap: wrap_object=lPFL_r method=hybrid
    UWLigament lPFL2: isDisabled=true linear_stiffness=35 reference_strain=0.01 reference_length=0.04916048
      PathPoint P1: femur_r (0.00418 -0.41523 0.03836)
      PathPoint P2: patella_r (0.00247 0.00348 0.02165)
      PathWrap: wrap_object=lPFL_r method=hybrid
    UWLigament lPFL3: isDisabled=true linear_stiffness=35 reference_strain=0.01 reference_length=0.05254255
      PathPoint P1: femur_r (0.00147 -0.41394 0.03911)
      PathPoint P2: patella_r (0.00323 0.0052 0.02239)
      PathWrap: wrap_object=lPFL_r method=hybrid
    UWLigament lPFL4: isDisabled=true linear_stiffness=35 reference_strain=0.01 reference_length=0.0504262
      PathPoint P1: femur_r (0.00344 -0.41847 0.03882)
      PathPoint P2: patella_r (0.00308 -0.003 0.02029)
      PathWrap: wrap_object=lPFL_r method=hybrid
    UWLigament lPFL5: isDisabled=true linear_stiffness=35 reference_strain=0 reference_length=0.04830635
      PathPoint P1: femur_r (0.00368 -0.4122 0.03804)
      PathPoint P2: patella_r (0.0008 0.00657 0.02177)
      PathWrap: wrap_object=lPFL_r method=hybrid
    UWLigament lPFL6: isDisabled=true linear_stiffness=35 reference_strain=0.01 reference_length=0.05411121
      PathPoint P1: femur_r (0.00093 -0.41671 0.03961)
      PathPoint P2: patella_r (0.00449 0.00138 0.02177)
      PathWrap: wrap_object=lPFL_r method=hybrid
    UWLigament lPFL7: isDisabled=true linear_stiffness=35 reference_strain=0.01 reference_length=0.0467852
      PathPoint P1: femur_r (0.00529 -0.41744 0.03815)
      PathPoint P2: patella_r (0.00095 3e-5 0.02073)
      PathWrap: wrap_object=lPFL_r method=hybrid
    UWLigament lPFL8: isDisabled=true linear_stiffness=35 reference_strain=0.01 reference_length=0.05306556
      PathPoint P1: femur_r (0.00158 -0.41164 0.03859)
      PathPoint P2: patella_r (0.00304 0.00932 0.02153)
      PathWrap: wrap_object=lPFL_r method=hybrid
    UWLigament lPFL9: isDisabled=true linear_stiffness=35 reference_strain=0.01 reference_length=0.05314753
      PathPoint P1: femur_r (0.00225 -0.41991 0.03917)
      PathPoint P2: patella_r (0.00469 -0.00295 0.0202)
      PathWrap: wrap_object=lPFL_r method=hybrid
    UWLigament lPFL10: isDisabled=true linear_stiffness=35 reference_strain=-0.03 reference_length=0.04608264
      PathPoint P1: femur_r (0.00547 -0.41298 0.03758)
      PathPoint P2: patella_r (0.00064 0.00247 0.02106)
      PathWrap: wrap_object=lPFL_r method=hybrid
    UWLigament lPFL11: isDisabled=true linear_stiffness=35 reference_strain=0.01 reference_length=0.05598545
      PathPoint P1: femur_r (-0.00014 -0.41417 0.03971)
      PathPoint P2: patella_r (0.00505 0.00505 0.02214)
      PathWrap: wrap_object=lPFL_r method=hybrid
    UWLigament lPFL12: isDisabled=true linear_stiffness=35 reference_strain=0.01 reference_length=0.04897291
      PathPoint P1: femur_r (0.00479 -0.42007 0.03838)
      PathPoint P2: patella_r (0.00257 -0.00464 0.01934)
      PathWrap: wrap_object=lPFL_r method=hybrid
    UWLigament lPFL13: isDisabled=true linear_stiffness=35 reference_strain=0 reference_length=0.05221167
      PathPoint P1: femur_r (0.00284 -0.40982 0.03771)
      PathPoint P2: patella_r (0.0021 0.01273 0.01936)
      PathWrap: wrap_object=lPFL_r method=hybrid
    UWLigament lPFL14: isDisabled=true linear_stiffness=35 reference_strain=0.01 reference_length=0.05580731
      PathPoint P1: femur_r (0.0004 -0.41926 0.03977)
      PathPoint P2: patella_r (0.00555 -0.00118 0.02073)
      PathWrap: wrap_object=lPFL_r method=hybrid
    UWLigament lPFL15: isDisabled=true linear_stiffness=35 reference_strain=0.01 reference_length=0.04721714
      PathPoint P1: femur_r (0.00616 -0.41626 0.03775)
      PathPoint P2: patella_r (0.00215 0.00252 0.02063)
      PathWrap: wrap_object=lPFL_r method=hybrid
    UWLigament mPFL1: isDisabled=true linear_stiffness=80 reference_strain=0.03 reference_length=0.04354171
      PathPoint P1: femur_r (0.01275 -0.41572 -0.04536)
      PathPoint P2: patella_r (0.00556 0.0026 -0.02657)
      PathWrap: wrap_object=mPFL_r method=hybrid
    UWLigament mPFL2: isDisabled=true linear_stiffness=80 reference_strain=0.03 reference_length=0.04393631
      PathPoint P1: femur_r (0.01134 -0.41588 -0.04678)
      PathPoint P2: patella_r (0.00416 0.00206 -0.02689)
      PathWrap: wrap_object=mPFL_r method=hybrid
    UWLigament mPFL3: isDisabled=true linear_stiffness=80 reference_strain=0 reference_length=0.04388514
      PathPoint P1: femur_r (0.01471 -0.41313 -0.04402)
      PathPoint P2: patella_r (0.00704 0.00649 -0.02469)
      PathWrap: wrap_object=mPFL_r method=hybrid
    UWLigament mPFL4: isDisabled=true linear_stiffness=80 reference_strain=0.03 reference_length=0.04388176
      PathPoint P1: femur_r (0.01261 -0.41983 -0.04581)
      PathPoint P2: patella_r (0.00657 -0.00248 -0.02702)
      PathWrap: wrap_object=mPFL_r method=hybrid
    UWLigament mPFL5: isDisabled=true linear_stiffness=80 reference_strain=0 reference_length=0.04368561
      PathPoint P1: femur_r (0.01142 -0.41316 -0.04629)
      PathPoint P2: patella_r (0.00354 0.00467 -0.02628)
      PathWrap: wrap_object=mPFL_r method=hybrid
    UWLigament mPFL6: isDisabled=true linear_stiffness=80 reference_strain=0.03 reference_length=0.04261583
      PathPoint P1: femur_r (0.01586 -0.4171 -0.04378)
      PathPoint P2: patella_r (0.00821 0.00214 -0.02617)
      PathWrap: wrap_object=mPFL_r method=hybrid
    UWLigament mPFL7: isDisabled=true linear_stiffness=80 reference_strain=0.03 reference_length=0.04356567
      PathPoint P1: femur_r (0.00925 -0.41925 -0.04744)
      PathPoint P2: patella_r (0.00242 -0.00288 -0.0276)
      PathWrap: wrap_object=mPFL_r method=hybrid
    UWLigament mPFL8: isDisabled=true linear_stiffness=80 reference_strain=-0.02 reference_length=0.04408573
      PathPoint P1: femur_r (0.01316 -0.40891 -0.04334)
      PathPoint P2: patella_r (0.00355 0.01077 -0.02103)
      PathWrap: wrap_object=mPFL_r method=hybrid
    UWLigament mPFL9: isDisabled=true linear_stiffness=80 reference_strain=0.03 reference_length=0.04363176
      PathPoint P1: femur_r (0.01424 -0.42079 -0.04464)
      PathPoint P2: patella_r (0.00783 -0.00164 -0.02611)
      PathWrap: wrap_object=mPFL_r method=hybrid
    UWLigament mPFL10: isDisabled=true linear_stiffness=80 reference_strain=0.03 reference_length=0.04439009
      PathPoint P1: femur_r (0.00982 -0.41412 -0.04728)
      PathPoint P2: patella_r (0.00233 0.00324 -0.02604)
      PathWrap: wrap_object=mPFL_r method=hybrid
    UWLigament mPFL11: isDisabled=true linear_stiffness=80 reference_strain=-0.02 reference_length=0.04261354
      PathPoint P1: femur_r (0.01703 -0.41336 -0.04202)
      PathPoint P2: patella_r (0.00878 0.00533 -0.02391)
      PathWrap: wrap_object=mPFL_r method=hybrid
    UWLigament mPFL12: isDisabled=true linear_stiffness=80 reference_strain=0.03 reference_length=0.04415772
      PathPoint P1: femur_r (0.01042 -0.42291 -0.04634)
      PathPoint P2: patella_r (0.00488 -0.00704 -0.02653)
      PathWrap: wrap_object=mPFL_r method=hybrid
    UWLigament mPFL13: isDisabled=true linear_stiffness=80 reference_strain=-0.01 reference_length=0.04360904
      PathPoint P1: femur_r (0.01102 -0.40975 -0.0454)
      PathPoint P2: patella_r (0.0018 0.00881 -0.0242)
      PathWrap: wrap_object=mPFL_r method=hybrid
    UWLigament mPFL14: isDisabled=true linear_stiffness=80 reference_strain=0.03 reference_length=0.04274247
      PathPoint P1: femur_r (0.0164 -0.4197 -0.04329)
      PathPoint P2: patella_r (0.00894 -0.00042 -0.02494)
      PathWrap: wrap_object=mPFL_r method=hybrid
    UWLigament mPFL15: isDisabled=true linear_stiffness=80 reference_strain=0.03 reference_length=0.04519412
      PathPoint P1: femur_r (0.00752 -0.4175 -0.04803)
      PathPoint P2: patella_r (0.00107 -0.00017 -0.02617)
      PathWrap: wrap_object=mPFL_r method=hybrid
    UWLigament pMC1: linear_stiffness=200 reference_strain=0.05 reference_length=0.0653618
      PathPoint P1: femur_r (-0.0048 -0.40808 -0.04517)
      PathPoint P2: tibia_r (-0.01216 -0.04944 -0.03087)
      PathWrap: wrap_object=Med_LigP_r method=hybrid
    UWLigament pMC2: linear_stiffness=200 reference_strain=0.05 reference_length=0.06428249
      PathPoint P1: femur_r (-0.00311 -0.40849 -0.04668)
      PathPoint P2: tibia_r (-0.01 -0.04944 -0.03311)
      PathWrap: wrap_object=Med_LigP_r method=hybrid
    UWLigament pMC3: linear_stiffness=200 reference_strain=0.05 reference_length=0.06637965
      PathPoint P1: femur_r (-0.00456 -0.40777 -0.04562)
      PathPoint P2: tibia_r (-0.01389 -0.0486 -0.02848)
      PathWrap: wrap_object=Med_LigP_r method=hybrid
    UWLigament pMC4: linear_stiffness=200 reference_strain=0.05 reference_length=0.06498258
      PathPoint P1: femur_r (-0.00562 -0.40946 -0.04607)
      PathPoint P2: tibia_r (-0.01194 -0.05109 -0.03164)
      PathWrap: wrap_object=Med_LigP_r method=hybrid
    UWLigament pMC5: linear_stiffness=200 reference_strain=0.05 reference_length=0.06565634
      PathPoint P1: femur_r (-0.00145 -0.40656 -0.04608)
      PathPoint P2: tibia_r (-0.01058 -0.04808 -0.03275)
      PathWrap: wrap_object=Med_LigP_r method=hybrid
    UWLigament pMC6: linear_stiffness=200 reference_strain=0.05 reference_length=0.06737173
      PathPoint P1: femur_r (-0.00836 -0.40733 -0.04186)
      PathPoint P2: tibia_r (-0.01445 -0.04987 -0.02723)
      PathWrap: wrap_object=Med_LigP_r method=hybrid
    UWLigament pMC7: linear_stiffness=200 reference_strain=0.05 reference_length=0.06332471
      PathPoint P1: femur_r (-0.00331 -0.40993 -0.0475)
      PathPoint P2: tibia_r (-0.00893 -0.05045 -0.03395)
      PathWrap: wrap_object=Med_LigP_r method=hybrid
    UWLigament pMC8: linear_stiffness=200 reference_strain=0.05 reference_length=0.06422767
      PathPoint P1: femur_r (-0.00468 -0.40841 -0.04557)
      PathPoint P2: tibia_r (-0.01339 -0.04752 -0.02951)
      PathWrap: wrap_object=Med_LigP_r method=hybrid
    UWLigament pMC9: linear_stiffness=200 reference_strain=0.05 reference_length=0.06593695
      PathPoint P1: femur_r (-0.00784 -0.40983 -0.04477)
      PathPoint P2: tibia_r (-0.01392 -0.05181 -0.02889)
      PathWrap: wrap_object=Med_LigP_r method=hybrid
    UWLigament pMC10: linear_stiffness=200 reference_strain=0.05 reference_length=0.06281528
      PathPoint P1: femur_r (-0.00023 -0.40871 -0.04749)
      PathPoint P2: tibia_r (-0.00729 -0.04847 -0.03544)
      PathWrap: wrap_object=Med_LigP_r method=hybrid
    UWLigament PFL1: linear_stiffness=220 reference_strain=0.02 reference_length=0.04716931
      PathPoint P1: femur_r (-0.00151 -0.42619 0.03843)
      PathPoint P2: tibia_r (-0.0153 -0.04764 0.04119)
    UWLigament PFL2: linear_stiffness=220 reference_strain=0.02 reference_length=0.04521592
      PathPoint P1: femur_r (-0.00378 -0.4268 0.03821)
      PathPoint P2: tibia_r (-0.01492 -0.04708 0.03863)
    UWLigament PFL3: linear_stiffness=220 reference_strain=0.02 reference_length=0.04909497
      PathPoint P1: femur_r (-0.00022 -0.42501 0.03896)
      PathPoint P2: tibia_r (-0.01673 -0.0472 0.04332)
    UWLigament PFL4: linear_stiffness=220 reference_strain=-0.04 reference_length=0.04401535
      PathPoint P1: femur_r (-0.00149 -0.42865 0.03796)
      PathPoint P2: tibia_r (-0.01238 -0.04822 0.04093)
    UWLigament PFL5: linear_stiffness=220 reference_strain=0.02 reference_length=0.04769188
      PathPoint P1: femur_r (-0.00431 -0.42463 0.039)
      PathPoint P2: tibia_r (-0.01701 -0.04694 0.03947)
    UWLigament PFL6: linear_stiffness=220 reference_strain=-0.04 reference_length=0.04999624
      PathPoint P1: femur_r (0.00276 -0.42597 0.03833)
      PathPoint P2: tibia_r (-0.0149 -0.04862 0.04432)
    UWLigament PFL7: linear_stiffness=220 reference_strain=0.02 reference_length=0.04442064
      PathPoint P1: femur_r (-0.00419 -0.42819 0.03756)
      PathPoint P2: tibia_r (-0.0132 -0.04864 0.03744)
    UWLigament PFL8: linear_stiffness=220 reference_strain=0.02 reference_length=0.05126015
      PathPoint P1: femur_r (-0.00116 -0.42374 0.03936)
      PathPoint P2: tibia_r (-0.01931 -0.04724 0.04248)
    UWLigament PFL9: linear_stiffness=220 reference_strain=-0.06 reference_length=0.04589077
      PathPoint P1: femur_r (0.0017 -0.42974 0.03789)
      PathPoint P2: tibia_r (-0.01197 -0.05011 0.04321)
    UWLigament PFL10: linear_stiffness=220 reference_strain=0.02 reference_length=0.04684057
      PathPoint P1: femur_r (-0.00767 -0.4258 0.03792)
      PathPoint P2: tibia_r (-0.01689 -0.04851 0.03616)
  ContactGeometrySet:
    ContactMesh femur_TF_mesh_r: body_name=femur_r location=(0 0 0) filename=femur_component_contact.obj
    ContactMesh tibia_mesh_r: body_name=tibia_r location=(0 0 0) filename=tibia_insert_contact.obj
